<Lems>

<!-- Specify which component to run -->
<DefaultRun component="sim1"/>

<!-- Include core NeuroML2 ComponentType definitions -->
<Include file="NeuroML2CoreTypes/Cells.xml"/>
<Include file="NeuroML2CoreTypes/Networks.xml"/>
<Include file="NeuroML2CoreTypes/Simulation.xml"/>

<Include file="Leak.nml"/>
<Include file="k_slow.nml"/>
<Include file="k_fast.nml"/>
<Include file="ca_boyle.nml"/>
<Include file="SingleCompMuscleCell.nml"/>

<voltageClamp id="vClamp1" delay="5ms" duration="20ms" targetVoltage="-60mV" seriesResistance="1ohm"/>
<voltageClamp id="vClamp2" delay="5ms" duration="20ms" targetVoltage="-50mV" seriesResistance="1ohm"/>
<voltageClamp id="vClamp3" delay="5ms" duration="20ms" targetVoltage="-40mV" seriesResistance="1ohm"/>
<voltageClamp id="vClamp4" delay="5ms" duration="20ms" targetVoltage="-30mV" seriesResistance="1ohm"/>
<voltageClamp id="vClamp5" delay="5ms" duration="20ms" targetVoltage="-20mV" seriesResistance="1ohm"/>
<voltageClamp id="vClamp6" delay="5ms" duration="20ms" targetVoltage="-10mV" seriesResistance="1ohm"/>
<voltageClamp id="vClamp7" delay="5ms" duration="20ms" targetVoltage="0mV" seriesResistance="1ohm"/>
<voltageClamp id="vClamp8" delay="5ms" duration="20ms" targetVoltage="10mV" seriesResistance="1ohm"/>
<voltageClamp id="vClamp9" delay="5ms" duration="20ms" targetVoltage="20mV" seriesResistance="1ohm"/>
<voltageClamp id="vClamp10" delay="5ms" duration="20ms" targetVoltage="30mV" seriesResistance="1ohm"/>
<voltageClamp id="vClamp11" delay="5ms" duration="20ms" targetVoltage="40mV" seriesResistance="1ohm"/>

<pulseGenerator id="offsetToMin70" delay="0ms" duration="1000ms" amplitude="-500 pA" />

<network id="net1">
    <population id="mc1" component="SingleCompMuscleCell" size="1"/>
    <population id="mc2" component="SingleCompMuscleCell" size="1"/>
    <population id="mc3" component="SingleCompMuscleCell" size="1"/>
    <population id="mc4" component="SingleCompMuscleCell" size="1"/>
    <population id="mc5" component="SingleCompMuscleCell" size="1"/>
    <population id="mc6" component="SingleCompMuscleCell" size="1"/>
    <population id="mc7" component="SingleCompMuscleCell" size="1"/>
    <population id="mc8" component="SingleCompMuscleCell" size="1"/>
    <population id="mc9" component="SingleCompMuscleCell" size="1"/>
    <population id="mc10" component="SingleCompMuscleCell" size="1"/>
    <population id="mc11" component="SingleCompMuscleCell" size="1"/>

    <explicitInput target="mc1[0]" input="offsetToMin70"/>
    <explicitInput target="mc2[0]" input="offsetToMin70"/>
    <explicitInput target="mc3[0]" input="offsetToMin70"/>
    <explicitInput target="mc4[0]" input="offsetToMin70"/>
    <explicitInput target="mc5[0]" input="offsetToMin70"/>
    <explicitInput target="mc6[0]" input="offsetToMin70"/>
    <explicitInput target="mc7[0]" input="offsetToMin70"/>
    <explicitInput target="mc8[0]" input="offsetToMin70"/>
    <explicitInput target="mc9[0]" input="offsetToMin70"/>
    <explicitInput target="mc10[0]" input="offsetToMin70"/>
    <explicitInput target="mc11[0]" input="offsetToMin70"/>

    <explicitInput target="mc1[0]" input="vClamp1"/>
    <explicitInput target="mc2[0]" input="vClamp2"/>
    <explicitInput target="mc3[0]" input="vClamp3"/>
    <explicitInput target="mc4[0]" input="vClamp4"/>
    <explicitInput target="mc5[0]" input="vClamp5"/>
    <explicitInput target="mc6[0]" input="vClamp6"/>
    <explicitInput target="mc7[0]" input="vClamp7"/>
    <explicitInput target="mc8[0]" input="vClamp8"/>
    <explicitInput target="mc9[0]" input="vClamp9"/>
    <explicitInput target="mc10[0]" input="vClamp10"/>
    <explicitInput target="mc11[0]" input="vClamp11"/>
</network>

<Simulation id="sim1" length="30ms" step="0.0025ms" target="net1">

    <Display id="d1" title="Voltage responses at 100pA to 700 pA" timeScale="1ms">
        <Line id="l1" quantity="mc1[0]/v" scale="1mV"  color="#ffffff" save="v1.dat"/>
        <Line id="l2" quantity="mc2[0]/v" scale="1mV"  color="#ffffdd" save="v2.dat"/>
        <Line id="l3" quantity="mc3[0]/v" scale="1mV"  color="#ffffbb" save="v3.dat"/>
        <Line id="l4" quantity="mc4[0]/v" scale="1mV"  color="#ffddbb" save="v4.dat"/>
        <Line id="l5" quantity="mc5[0]/v" scale="1mV"  color="#ffbbbb" save="v5.dat"/>
        <Line id="l6" quantity="mc6[0]/v" scale="1mV"  color="#ddffbb" save="v6.dat"/>
        <Line id="l7" quantity="mc7[0]/v" scale="1mV"  color="#bbffbb" save="v7.dat"/>
    </Display>

    <Display id="d2" title="Currents through voltage clamps" timeScale="1ms">

        <Line id="li1" quantity="mc1[0]/vClamp1/i" scale="1nA"  color="#111fbb" save="i1.dat"/>
        <Line id="li2" quantity="mc2[0]/vClamp2/i" scale="1nA"  color="#222fbb" save="i2.dat"/>
        <Line id="li3" quantity="mc3[0]/vClamp3/i" scale="1nA"  color="#333fbb" save="i3.dat"/>
        <Line id="li4" quantity="mc4[0]/vClamp4/i" scale="1nA"  color="#444fbb" save="i4.dat"/>
        <Line id="li5" quantity="mc5[0]/vClamp5/i" scale="1nA"  color="#555fbb" save="i5.dat"/>
        <Line id="li6" quantity="mc6[0]/vClamp6/i" scale="1nA"  color="#666fbb" save="i6.dat"/>
        <Line id="li7" quantity="mc7[0]/vClamp7/i" scale="1nA"  color="#777fbb" save="i7.dat"/>
        <Line id="li8" quantity="mc8[0]/vClamp8/i" scale="1nA"  color="#888fbb" save="i8.dat"/>
        <Line id="li9" quantity="mc9[0]/vClamp9/i" scale="1nA"  color="#999fbb" save="i9.dat"/>
        <Line id="li10" quantity="mc10[0]/vClamp10/i" scale="1nA"  color="#aaafbb" save="i10.dat"/>
        <Line id="li11" quantity="mc11[0]/vClamp11/i" scale="1nA"  color="#bbbfbb" save="i11.dat"/>

    </Display>

 <!--    <Display id="d2" title="Rate variables at 700 pA" timeScale="1ms">

        <Line id="l1" quantity="mc7[0]/biophys/membraneProperties/k_slow_all/k_slow/n/q" scale="1"  color="#000000" save="k_slow_n.dat"/>
        <Line id="l2" quantity="mc7[0]/biophys/membraneProperties/k_fast_all/k_fast/p/q" scale="1"  color="#0000ff" save="k_fast_p.dat"/>
        <Line id="l3" quantity="mc7[0]/biophys/membraneProperties/k_fast_all/k_fast/q/q" scale="1"  color="#00ffff" save="k_fast_q.dat"/>
        <Line id="l4" quantity="mc7[0]/biophys/membraneProperties/ca_boyle_all/ca_boyle/e/q" scale="1"  color="#ff00ff" save="ca_boyle_e.dat"/>
        <Line id="l5" quantity="mc7[0]/biophys/membraneProperties/ca_boyle_all/ca_boyle/f/q" scale="1"  color="#ffff00" save="ca_boyle_f.dat"/>
    </Display>

    <Display id="d4" title="Current densities at 700 pA" timeScale="1ms">
        <Line id="li0" quantity="mc7[0]/biophys/membraneProperties/Leak_all/iDensity" scale="1nA"  color="#550000" save="i_l.dat"/>
        <Line id="li1" quantity="mc7[0]/biophys/membraneProperties/k_slow_all/iDensity" scale="1nA"  color="#005500" save="i_ks.dat"/>
        <Line id="li2" quantity="mc7[0]/biophys/membraneProperties/k_fast_all/iDensity" scale="1nA"  color="#000055" save="i_kf.dat"/>
        <Line id="li3" quantity="mc7[0]/biophys/membraneProperties/ca_boyle_all/iDensity" scale="1nA"  color="#fff555" save="i_ca.dat"/>

    </Display>-->

</Simulation>

</Lems>
